*Node
    1,2,3,4
    2,6,3,2
    3,2,5,1
    4,4,3,6
*Element, Type=C3D4, Elset=ALL
    1, 1, 2, 3, 4
*MATERIAL, NAME=STEEL
	*ELASTIC
		96, 0.3333333333333
    *DENSITY
        1
*Solid section, Elset=ALL, Material=STEEL
*STEP
	*FREQUENCY,SOLVER=MATRIXSTORAGE
*End step
